!!!!!!!!!!!!!!!!!!!!!!!!!!!!!!!!!!!
/PREP7
!!!!!!!!!!!!!!!!
!  PARAMETERS
!!!!!!!!!!!!!!!!
R=12.6051E-3
H=60E-3
NV=38
NC=33
D_SHELIX=1.155E-3
AA=0.198E-3
BB=0.198E-3
LOOP_NO = 4
PITCH=H/LOOP_NO
PI = 3.1415927
DELTA_TH = 2*PI/NV
DELTA_H = H/(NC-1)
TH_SHELIX = D_SHELIX/R
NOBUCK = 1
!!!!!!!!!!!!!!!!!!!!!!!!!!!!!!!!!!!
!!!!!!!!!!!!!!!!!!!!!!
!!  MAIN CODE STARTS
!!!!!!!!!!!!!!!!!!!!!!
!!!!!!!!!!!!!!!!!!!!!!
!!  VERTICAL BEAMS
!!!!!!!!!!!!!!!!!!!!!!
COUNT=1
TH=0
*DO,II,1,NV
K,COUNT,R*COS(TH),R*SIN(TH),0
TH = TH + DELTA_TH
COUNT = COUNT + 1
*ENDDO
TH=0
*DO,II,1,NV
K,COUNT,R*COS(TH),R*SIN(TH),H
TH = TH + DELTA_TH
COUNT = COUNT + 1
*ENDDO
!!!!!!!!!!!!!!!!!!!!!!!!!!!
!!  CIRCUMFERENTIAL BEAMS
!!!!!!!!!!!!!!!!!!!!!!!!!!!
COUNT_LINE=1
*DO,II,1,NV
L,COUNT_LINE,COUNT_LINE+NV
COUNT_LINE = COUNT_LINE + 1
*ENDDO
HH=0
*DO,II,1,NC
K,COUNT,0,0,HH
CIRCLE,COUNT,R
COUNT = COUNT + 5
COUNT_LINE = COUNT_LINE + 4
HH = HH + DELTA_H
*ENDDO
